clear
new circuit.MasterIEEE13 ! Name of file MasterIEEE13
~ basekv=115 pu=1.0 phases=3 bus1=SourceBus
~ Angle=30  MVAsc3=2000000 MVASC1=2100000 ! to make an infinite source
Redirect loadshapes.DSS
Redirect Transformers.txt
Redirect Lines.txt
Redirect Loads.txt
Redirect Capacitors.txt

Set Voltagebases=[115, 4.16, .48] ! Three Voltage levels

Calcvoltagebases
set controlmode=off
batchedit load..* vminpu=0.65
batchedit load..* vmaxpu=1.20

!BusCoords IEEE13Node_BusXY.csv
New EnergyMeter.EM1 Element=Line.650632 1
solve
